# -*- coding: utf-8 -*-
""" Sofa prefab for a S90 servo actuators with a default kinematic controller and visual model
    This model is part of the SoftRobot toolkit available at:
        https://github.com/SofaDefrost/SoftRobots
    Available prefab:
        - ServoMotor
    Available python object:
        - KinematicMotorController
        - ServoWheel
"""
import math
import os
import pathlib
import sys

sys.path.insert(0, str(pathlib.Path(__file__).parent.absolute())+"/../")
sys.path.insert(0, str(pathlib.Path(__file__).parent.absolute()))

from splib3.animation import animate
from splib3.objectmodel import *
from stlib3.scene import Scene

mesh_path = os.path.dirname(os.path.abspath(__file__))+'/mesh/'


class ServoMotor(Sofa.Prefab):
    """A S90 servo motor

    This prefab is implementing a S90 servo motor.
    https://servodatabase.com/servo/towerpro/sg90

    The prefab ServoMotor is composed of:
    - a visual model
    - a mechanical model composed two rigids. One rigid is for the motor body
      while the other is implementing the servo rotating wheel.

    The prefab has the following parameters:
    - translation           to change default location of the servo (default [0.0,0.0,0.0])
    - rotation              to change default rotation of the servo (default [0.0,0.0,0.0,1])
    - scale                 to change default scale of the servo (default 1)
    - showServo             to control wether a visual model of the motor is added (default True)
    - showWheel             to control wether the rotation axis of the motor is displayed (default False)

    The prefab have the following property:
    - angle         use this to specify the angle of rotation of the servo motor
    - angleLimits   use this to set a min and max value for the servo angle rotation
    - position      use this to specify the position of the servo motor

    Example of use in a Sofa scene:

    def addScene(root):
        ...
        servo = ServoMotor(root)

        ## Direct access to the components
        servo.angle.value = 1.0
    """
    prefabParameters = [
        {'name': 'rotation', 'type': 'Vec3d', 'help': 'Rotation', 'default': [0.0, 0.0, 0.0]},
        {'name': 'translation', 'type': 'Vec3d', 'help': 'Translation', 'default': [0.0, 0.0, 0.0]},
        {'name': 'scale3d', 'type': 'Vec3d', 'help': 'Scale 3d', 'default': [1.0, 1.0, 1.0]}]

    prefabData = [
        {'name': 'minAngle', 'help': 'min angle of rotation (in radians)', 'type': 'float', 'default': -100},
        {'name': 'maxAngle', 'help': 'max angle of rotation (in radians)', 'type': 'float', 'default': 100},
        {'name': 'angleIn', 'help': 'angle of rotation (in radians)', 'type': 'float', 'default': 0},
        {'name': 'angleOut', 'help': 'angle of rotation (in degree)', 'type': 'float', 'default': 0}
    ]

    def __init__(self, *args, **kwargs):
        Sofa.Prefab.__init__(self, *args, **kwargs)

        # Servo body
        servoBody = self.addChild('ServoBody')
        servoBody.addObject('MechanicalObject', name='dofs', template='Rigid3',
                            position=[[0., 0., 0., 0., 0., 0., 1.]],
                            translation=self.translation.value, rotation=self.rotation.value,
                            scale3d=self.scale3d.value
                            )
        servoBody.addObject('FixedConstraint', indices=0)
        servoBody.addObject('UniformMass', totalMass=0.01)

        visual = servoBody.addChild('VisualModel')
        visual.addObject('MeshSTLLoader', name='loader', filename=mesh_path + 'SG90_servomotor.stl')
        visual.addObject('MeshTopology', src='@loader')
        visual.addObject('OglModel', color=[0.15, 0.45, 0.75, 0.7], writeZTransparent=False)
        visual.addObject('RigidMapping', index=0)

        # Servo wheel
        angle = self.addChild('Articulation')
        angle.addObject('MechanicalObject', name='dofs', template='Vec1', position=[[0]],
                        rest_position=self.angleIn.getLinkPath())
        angle.addObject('RestShapeSpringsForceField', points=0, stiffness=1e9)
        angle.addObject('UniformMass', totalMass=0.01)

        servoWheel = angle.addChild('ServoWheel')
        servoWheel.addObject('MechanicalObject', name='dofs', template='Rigid3',
                             position=[[0., 0., 0., 0., 0., 0., 1.], [0., 0., 0., 0., 0., 0., 1.]], showObjectScale=20,
                             translation=self.translation.value, rotation=self.rotation.value,
                             scale3d=self.scale3d.value
                             )
        servoWheel.addObject('ArticulatedSystemMapping', input1="@../dofs", input2="@../../ServoBody/dofs",
                             output="@./")

        articulationCenter = angle.addChild('ArticulationCenter')
        articulationCenter.addObject('ArticulationCenter', parentIndex=0, childIndex=1, posOnParent=[0., 0., 0.],
                                     posOnChild=[0., 0., 0.])
        articulation = articulationCenter.addChild('Articulations')
        articulation.addObject('Articulation', translation=False, rotation=True, rotationAxis=[1, 0, 0],
                               articulationIndex=0)
        angle.addObject('ArticulatedHierarchyContainer', printLog=False)

        # The output
        self.angleOut.setParent(angle.dofs.position)


def createScene(rootNode):
    def animation(target, factor):
        target.angleIn.value = math.cos(factor * 2 * math.pi)

    scene = Scene(rootNode, plugins=['SofaConstraint', 'SofaGeneralRigid', 'SofaOpenglVisual', 'SofaRigid',
                                     "ArticulatedSystemPlugin", "Sofa.Component.AnimationLoop",
                                     "Sofa.Component.Constraint.Lagrangian.Correction",
                                     "Sofa.Component.Constraint.Lagrangian.Solver",
                                     "Sofa.Component.Constraint.Projective", "Sofa.Component.IO.Mesh",
                                     "Sofa.Component.LinearSolver.Direct", "Sofa.Component.Mass",
                                     "Sofa.Component.ODESolver.Backward", "Sofa.Component.SolidMechanics.Spring",
                                     "Sofa.Component.Topology.Container.Constant", "Sofa.Component.Visual",
                                     "Sofa.GL.Component.Rendering3D", "Sofa.GUI.Component", ], iterative=False)

    scene.addMainHeader()
    scene.addObject('DefaultVisualManagerLoop')
    scene.addObject('FreeMotionAnimationLoop')
    scene.addObject('GenericConstraintSolver', maxIterations=1e3, tolerance=1e-5)
    scene.Simulation.addObject('GenericConstraintCorrection')

    scene.dt = 0.01
    scene.gravity = [0., -9810., 0.]

    scene.Simulation.addChild(ServoMotor(name="ServoMotor"))
    animate(animation, {'target': scene.Simulation.ServoMotor}, duration=10., mode='loop')
    scene.Simulation.ServoMotor.Articulation.ServoWheel.dofs.showObject = True


    return rootNode


if __name__ == '__main__':
    print("s90servo test")
